C_d := 0.02
r_F := 0.1
Δt := 0.1
F := 0  # Car's forward force input (magnitude)
γ := 0  # Car's steering angle input
P_x := 0  # Car's position on X axis
P_y := 0  # Car's position on Y axis
V := 0  # Car's speed (magnitude)
A := 0  # Car's forward accelaration (magnitude)
α := 0  # Car's heading
A(α, V) := [
    1, 0, cos(α)*Δt, 0.5*cos(α)*Δt^2, 0;
    0, 1, sin(α)*Δt, 0.5*sin(α)*Δt^2, 0;
    0, 0, 1, Δt, 0;
    0, 0, -0.5*C_d*V - r_F, 0, 0;
    0, 0, 0, 0, 1
]
X(t) := [P_x; P_y; V; A; α]  # error: This value must be a scalar.
B(V) := [0, 0, 0, 0, 0; 0, 0, 0, 0, 0; 0, 0, 0, 0, 0; 0, 0, 0, 1, 0; 0, 0, 0, 0, V*Δt]
u(F, γ) := [0; 0; 0; F; γ]
X(n + 1) := A*X(n) + B*u(n)  # error: A name is required here.
